*Heading
** Job name: SolidPatch-BiTens Model name: SolidPatch-BiTens
** Generated by: Abaqus/CAE 2022
*Preprint, echo=NO, model=NO, history=NO, contact=NO
**
** PARTS
**
*Part, name=compare
*Node
      1,          10.,          10.,          10.
      2,          10.,   6.66666651,          10.
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*Element, type=C3D8R
 1, 17, 18, 22, 21,  1,  2,  6,  5
 2, 18, 19, 23, 22,  2,  3,  7,  6
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*Nset, nset=Set-4, generate
  1,  64,   1
*Elset, elset=Set-4, generate
  1,  27,   1
** Section: compare
*Solid Section, elset=Set-4, material=elastic-plastic
,
*End Part
**
*Part, name=vumat
*Node
      1,          10.,          10.,          10.
      2,          10.,   6.66666651,          10.
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*Element, type=C3D8R
 1, 17, 18, 22, 21,  1,  2,  6,  5
 2, 18, 19, 23, 22,  2,  3,  7,  6
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*Nset, nset=Set-4, generate
  1,  64,   1
*Elset, elset=Set-4, generate
  1,  27,   1
** Section: vumat
*Solid Section, elset=Set-4, material=VUMAT
,
*End Part
**
**
** ASSEMBLY
**
*Assembly, name=Assembly
**
*Instance, name=vumat, part=vumat
*End Instance
**
*Instance, name=compare, part=compare
         11.,           0.,           0.
*End Instance
**
*Nset, nset=Set-3, instance=vumat
 13, 14, 15, 16, 29, 30, 31, 32, 45, 46, 47, 48, 61, 62, 63, 64
*Nset, nset=Set-3, instance=compare
 13, 14, 15, 16, 29, 30, 31, 32, 45, 46, 47, 48, 61, 62, 63, 64
*Elset, elset=Set-3, instance=vumat
  7,  8,  9, 16, 17, 18, 25, 26, 27
*Elset, elset=Set-3, instance=compare
  7,  8,  9, 16, 17, 18, 25, 26, 27
*Nset, nset=Set-4, instance=vumat
  1,  2,  3,  4, 17, 18, 19, 20, 33, 34, 35, 36, 49, 50, 51, 52
*Nset, nset=Set-4, instance=compare
  1,  2,  3,  4, 17, 18, 19, 20, 33, 34, 35, 36, 49, 50, 51, 52
*Elset, elset=Set-4, instance=vumat
  1,  2,  3, 10, 11, 12, 19, 20, 21
*Elset, elset=Set-4, instance=compare
  1,  2,  3, 10, 11, 12, 19, 20, 21
*Nset, nset=Set-5, instance=vumat, generate
  1,  16,   1
*Nset, nset=Set-5, instance=compare, generate
  1,  16,   1
*Elset, elset=Set-5, instance=vumat, generate
 1,  9,  1
*Elset, elset=Set-5, instance=compare, generate
 1,  9,  1
*Nset, nset=Set-6, instance=vumat, generate
 49,  64,   1
*Nset, nset=Set-6, instance=compare, generate
 49,  64,   1
*Elset, elset=Set-6, instance=vumat, generate
 19,  27,   1
*Elset, elset=Set-6, instance=compare, generate
 19,  27,   1
*Nset, nset=Set-7, instance=vumat, generate
  1,  61,   4
*Nset, nset=Set-7, instance=compare, generate
  1,  61,   4
*Elset, elset=Set-7, instance=vumat, generate
  1,  25,   3
*Elset, elset=Set-7, instance=compare, generate
  1,  25,   3
*Nset, nset=Set-8, instance=vumat, generate
  4,  64,   4
*Nset, nset=Set-8, instance=compare, generate
  4,  64,   4
*Elset, elset=Set-8, instance=vumat, generate
  3,  27,   3
*Elset, elset=Set-8, instance=compare, generate
  3,  27,   3
*Nset, nset=Set-9, instance=vumat
 13, 14, 15, 16, 29, 30, 31, 32, 45, 46, 47, 48, 61, 62, 63, 64
*Nset, nset=Set-9, instance=compare
 13, 14, 15, 16, 29, 30, 31, 32, 45, 46, 47, 48, 61, 62, 63, 64
*Elset, elset=Set-9, instance=vumat
  7,  8,  9, 16, 17, 18, 25, 26, 27
*Elset, elset=Set-9, instance=compare
  7,  8,  9, 16, 17, 18, 25, 26, 27
*End Assembly
*Amplitude, name=Amp-1, time=TOTAL TIME
             0.,              0.,           0.001,              1.,             10.,              1.
**
** MATERIALS
**
*Material, name=VUMAT

*density
7.0e-9
*user material, CONSTANTS=17
**      E,     nu,  sigma0,  Q1,   C1,     Q2,      C2,    Q3,
210000.0,    0.3,  290.7,   129.2, 168.6, 209.8,   10.68,  455.3,
**       C3,   n (hershey),  cp,      betaTQ,  T0,      Tm,       m,    pdot0,
         0.805,  10.,            452e6,   0.9,     293.0,   1800.0,   1000.0,  5e-5,
**       c
         0.0
*depvar
2
**1, p, "Euivalent plastic strain"
**2, T, "Temperature"
*TRANSVERSE SHEAR
**Calculated as 5/6*G*t
6578.947,6578.947,0.0
    *Material, name=elastic-plastic
*Density
 7e-09,
*Elastic
210000., 0.3
*Inelastic Heat Fraction
         0.9,
*Plastic
   290.7,         0.
 313.348, 0.00100033
  332.86, 0.00200067
 349.719,   0.003001
 364.333, 0.00400133
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 1044.31,         3.
*Specific Heat
 4.52e+08,
** ----------------------------------------------------------------
**
** STEP: load
**
*Step, name=load, nlgeom=YES
*Dynamic, Explicit, adiabatic
, 0.01
*Bulk Viscosity
0.06, 1.2
**
** BOUNDARY CONDITIONS
**
** Name: symmetry-bottom Type: Symmetry/Antisymmetry/Encastre
*Boundary
Set-9, ZSYMM
** Name: velNegY Type: Velocity/Angular velocity
*Boundary, amplitude=Amp-1, type=VELOCITY
Set-8, 2, 2, -150.
** Name: velNegx Type: Velocity/Angular velocity
*Boundary, amplitude=Amp-1, type=VELOCITY
Set-6, 1, 1, -150.
** Name: velPosY Type: Velocity/Angular velocity
*Boundary, amplitude=Amp-1, type=VELOCITY
Set-7, 2, 2, 150.
** Name: velXpos Type: Velocity/Angular velocity
*Boundary, amplitude=Amp-1, type=VELOCITY
Set-5, 1, 1, 150.
**
** OUTPUT REQUESTS
**
*Restart, write, number interval=1, time marks=NO
**
** FIELD OUTPUT: F-Output-1
**
*Output, field, number interval=40
*Node Output
A, RF, U, V
*Element Output, directions=YES
EVF, LE, PE, PEEQ, PEEQVAVG, PEVAVG, S, SDV, STATUS, SVAVG
*Contact Output
CSTRESS,
**
** HISTORY OUTPUT: H-Output-1
**
*Output, history, variable=PRESELECT
*End Step
